# OpenSim document version 20302
IKTool:
  constraint_weight: 20
  accuracy: 0.00001
  report_errors: true
  IKTaskSet leg39_IK:
    IKMarkerTask R.Thigh.Upper: apply=true weight=1
    IKMarkerTask R.Thigh.Front: apply=true weight=1
    IKMarkerTask R.Thigh.Rear: apply=true weight=1
    IKMarkerTask R.Shank.Upper: apply=true weight=1
    IKMarkerTask R.Shank.Front: apply=true weight=1
    IKMarkerTask R.Shank.Rear: apply=true weight=1
    IKMarkerTask R.Heel: apply=true weight=0.01
    IKMarkerTask R.Midfoot.Lat: apply=true weight=0.01
    IKMarkerTask R.Toe.Tip: apply=true weight=100
