# OpenSim document version 20303
Model tugOfWar_Stronger:
  length_units: meters
  force_units: N
  gravity: 0 0 0
  ForceSet:
    Thelen2003Muscle muscle1: min_control=0 max_control=1 optimal_force=1 max_isometric_force=1200
        optimal_fiber_length=0.25 tendon_slack_length=0.1 pennation_angle_at_optimal=0 max_contraction_velocity=10
        activation_time_constant=0.01 deactivation_time_constant=0.04 Vmax=10 Vmax0=5 FmaxTendonStrain=0.033
        FmaxMuscleStrain=0.6 KshapeActive=0.5 KshapePassive=4 damping=0.05 Af=0.3 Flen=1.8
      PathPoint point1: ground (0 0.05 -0.35)
      PathPoint point2: Block (0 0 -0.05)
    Thelen2003Muscle muscle2: min_control=0 max_control=1 optimal_force=1 max_isometric_force=1200
        optimal_fiber_length=0.25 tendon_slack_length=0.1 pennation_angle_at_optimal=0 max_contraction_velocity=10
        activation_time_constant=0.01 deactivation_time_constant=0.04 Vmax=10 Vmax0=5 FmaxTendonStrain=0.033
        FmaxMuscleStrain=0.6 KshapeActive=0.5 KshapePassive=4 damping=0.05 Af=0.3 Flen=1.8
      PathPoint point1: ground (0 0.05 0.35)
      PathPoint point2: Block (0 0 0.05)
  BodySet:
    Body ground: mass=0 mass_center=(0 0 0) inertia_xx=1 inertia_yy=1 inertia_zz=1
        meshes=(ground.vtp anchor1.vtp anchor2.vtp)
    Body Block: mass=20 mass_center=(0 0 0) inertia_xx=1 inertia_yy=1 inertia_zz=1 meshes=block.vtp
      FreeJoint blockToGround: parent_body=ground location_in_parent=(0 0.05 0) location=(0 0 0)
        Coordinate blockToGround_xRotation: motion_type=rotational default_value=0 initial_value=0
            range=(-1.5708 1.5708) clamped=false
        Coordinate blockToGround_yRotation: motion_type=rotational default_value=0 initial_value=0
            range=(-1.5708 1.5708) clamped=false
        Coordinate blockToGround_zRotation: motion_type=rotational default_value=0 initial_value=0
            range=(-1.5708 1.5708) clamped=false
        Coordinate blockToGround_xTranslation: motion_type=translational default_value=0 initial_value=0 range=(-1 1)
            clamped=false
        Coordinate blockToGround_yTranslation: motion_type=translational default_value=0 initial_value=0 range=(-1 1)
            clamped=false
        Coordinate blockToGround_zTranslation: motion_type=translational default_value=0 initial_value=0 range=(-1 1)
            clamped=false
  ControllerSet Controllers:
    PrescribedController LinearRamp Controller: actuator_list=(muscle1 muscle2)
      FunctionSet ControlFunctions: LinearFunction(coefficients=-0.333333 1) LinearFunction(coefficients=0.316667 0.05)
