# OpenSim document version 20001
Model ArmCurling_BrachialisInactive:
  credits: Menegolo Andrea
  length_units: meters
  force_units: N
  gravity: 0 -9.80665 0
  publications:
    Delp, S.L., Loan, J.P., Hoy, M.G., Zajac, F.E., Topp E.L., Rosen, J.M.: An interactive graphics-based model of the lower extremity to study orthopaedic surgical procedures, IEEE Transactions on Biomedical Engineering, vol. 37, pp. 757-767, 1990.
    Yamaguchi G.T., Zajac F.E.: A planar model of the knee joint to characterize the knee extensor mechanism." J . Biomecl7. vol. 21. pp. 1-10. 1989.
    Anderson F.C., Pandy M.G.: A dynamic optimization solution for vertical jumping in three dimensions. Computer Methods in Biomechanics and Biomedical Engineering 2:201-231, 1999.
    Anderson F.C., Pandy M.G.: Dynamic optimization of human walking. Journal of Biomechanical Engineering 123:381-390, 2001.
    Delp SL, Anderson FC, Arnold AS, Loan P, Habib A, John CT, Guendelman E, Thelen DG (in press). OpenSim: Open-source Software to Create and Analyze Dynamic Simulations of Movement. IEEE Transactions on Biomedical Engineering. (2007)
    Holzbaur KR, Murray WM, Delp SL.: A model of the upper extremity for simulating musculoskeletal surgery and analyzing neuromuscular control., Ann Biomed Eng. 2005 Jun;33(6):829-40. (2005)
    NOTE: This model has been developed on the base of the 3DGaitModel2354.osim model (developed by Delp S.L. et all) and the Stanford VA Upper Limb Model.osim model
    (developed by Holzbaur KR et all). Not additional informations are present in this model that cannot be found in the original ones.
    This model has been built by the author aiming only to provide a starting model for a full body model.
  defaults: Thelen2003Muscle default: max_isometric_force=546 optimal_fiber_length=0.0535 tendon_slack_length=0.078
      pennation_angle=0.1396263 activation_time_constant=0.01 deactivation_time_constant=0.04 Vmax=10 Vmax0=5
      FmaxTendonStrain=0.033 FmaxMuscleStrain=0.6 KshapeActive=0.5 KshapePassive=4 damping=0.05 Af=0.3 Flen=1.8
  ForceSet:
    Thelen2003Muscle BICEPS: max_isometric_force=1060 optimal_fiber_length=0.1157 tendon_slack_length=0.2723
        pennation_angle=0 activation_time_constant=0.01 deactivation_time_constant=0.04 Vmax=10 Vmax0=5
        FmaxTendonStrain=0.033 FmaxMuscleStrain=0.6 KshapeActive=0.5 KshapePassive=4 damping=0.05 Af=0.3 Flen=1.8
      PathPoint BIC-P1: humerus_r (0 0.001 0.02)
      PathPoint BIC-P2: forearm_r (0 -0.0484 0.02)
    Thelen2003Muscle BRACHIALIS: isDisabled=true max_isometric_force=987 optimal_fiber_length=0.0858
        tendon_slack_length=0.0535 pennation_angle=0 activation_time_constant=0.01 deactivation_time_constant=0.04
        Vmax=10 Vmax0=5 FmaxTendonStrain=0.033 FmaxMuscleStrain=0.6 KshapeActive=0.5 KshapePassive=4 damping=0.05
        Af=0.3 Flen=1.8
      PathPoint BRA-P1: humerus_r (0 -0.1739 0)
      PathPoint BRA-P2: forearm_r (0 -0.0239 0)
  BodySet:
    Body ground: mass=0 mass_center=(0 0 0) inertia_xx=0 inertia_yy=0 inertia_zz=0 meshes=treadmill.vtp
    Body pelvis: mass=11.777 mass_center=(-0.0707 0 0) inertia_xx=0.1028 inertia_yy=0.0871 inertia_zz=0.0579
        meshes=(sacrum.vtp pelvis_r.vtp pelvis_l.vtp)
      WeldJoint ground_pelvis: parent_body=ground location_in_parent=(0 0.945 0) location=(0 0 0)
    Body thorax: mass=22.926 mass_center=(-0.0355 -0.1476 0) inertia_xx=0.5639 inertia_yy=0.2625 inertia_zz=0.4191
        meshes=(thorax.vtp hat_spine.vtp)
      WeldJoint back: parent_body=pelvis location_in_parent=(-0.1007 0.0815 0) location=(-0.0205 -0.3785 0)
    Body head: mass=4.927 mass_center=(-0.0145 0.2015 0) inertia_xx=0.0174 inertia_yy=0.0129 inertia_zz=0.0187
        meshes=(hat_jaw.vtp hat_skull.vtp)
      WeldJoint neck: parent_body=thorax location_in_parent=(-0.04 0.13 0) location=(-0.04 0.13 0)
    Body femur_r: mass=9.3014 mass_center=(0 -0.17 0) inertia_xx=0.1339 inertia_yy=0.0351 inertia_zz=0.1412
        meshes=femur_r.vtp
      WeldJoint hip_r: parent_body=pelvis location_in_parent=(-0.0707 -0.0661 0.0835) location=(0 0 0)
    Body femur_l: mass=9.3014 mass_center=(0 -0.17 0) inertia_xx=0.1339 inertia_yy=0.0351 inertia_zz=0.1412
        meshes=femur_l.vtp
      WeldJoint hip_l: parent_body=pelvis location_in_parent=(-0.0707 -0.0661 -0.0835) location=(0 0 0)
    Body tibia_r: mass=3.7075 mass_center=(0 -0.1867 0) inertia_xx=0.0504 inertia_yy=0.0051 inertia_zz=0.0511
        meshes=(tibia_r.vtp fibula_r.vtp)
      WeldJoint knee_r: parent_body=femur_r location_in_parent=(0 -0.4 0) orientation_in_parent=(0 3.141593 0)
          location=(0 0 0) orientation=(0 3.141593 0)
    Body tibia_l: mass=3.7075 mass_center=(0 -0.1867 0) inertia_xx=0.0504 inertia_yy=0.0051 inertia_zz=0.0511
        meshes=(tibia_l.vtp fibula_l.vtp)
      WeldJoint knee_l: parent_body=femur_l location_in_parent=(0 -0.4 0) orientation_in_parent=(0 3.141593 0)
          location=(0 0 0) orientation=(0 3.141593 0)
    Body talus_r: mass=0.1 mass_center=(0 0 0) inertia_xx=0.001 inertia_yy=0.001 inertia_zz=0.001 meshes=talus_r.vtp
      WeldJoint ankle_r: parent_body=tibia_r location_in_parent=(0 -0.43 0) orientation_in_parent=(0 3.141593 0)
          location=(0 0 0) orientation=(0 3.141593 0)
    Body calcn_r: mass=1.25 mass_center=(0.1 0.03 0) inertia_xx=0.0014 inertia_yy=0.0039 inertia_zz=0.0041
        meshes=foot_r.vtp
      WeldJoint subtalar_r: parent_body=talus_r location_in_parent=(-0.04877 -0.04195 0.00792) location=(0 0 0)
    Body toes_r: mass=0.2166 mass_center=(0.0346 0.006 -0.0175) inertia_xx=0.0001 inertia_yy=0.0002 inertia_zz=0.001
        meshes=bofoot_r.vtp
      WeldJoint toe_flexion_r: parent_body=calcn_r location_in_parent=(0.1788 -0.002 0.00108) location=(0 0 0)
    Body talus_l: mass=0.1 mass_center=(0 0 0) inertia_xx=0.001 inertia_yy=0.001 inertia_zz=0.001 meshes=talus_l.vtp
      WeldJoint ankle_l: parent_body=tibia_l location_in_parent=(0 -0.43 0) orientation_in_parent=(0 3.141593 0)
          location=(0 0 0) orientation=(0 3.141593 0)
    Body calcn_l: mass=1.25 mass_center=(0.1 0.03 0) inertia_xx=0.0014 inertia_yy=0.0039 inertia_zz=0.0041
        meshes=foot_l.vtp
      WeldJoint subtalar_l: parent_body=talus_l location_in_parent=(-0.04877 -0.04195 -0.00792) location=(0 0 0)
    Body toes_l: mass=0.2166 mass_center=(0.0346 0.006 0.0175) inertia_xx=0.0001 inertia_yy=0.0002 inertia_zz=0.001
        meshes=bofoot_l.vtp
      WeldJoint toe_flexion_l: parent_body=calcn_l location_in_parent=(0.1788 -0.002 -0.00108) location=(0 0 0)
    Body clavicle_r: mass=0 mass_center=(0 0 0) inertia_xx=0 inertia_yy=0 inertia_zz=0 meshes=clavicle.vtp
      WeldJoint sternoclavicular_r: parent_body=thorax location_in_parent=(0.006325 0.00693 0.025465) location=(0 0 0)
    Body clavicle_l: mass=0 mass_center=(0 0 0) inertia_xx=0 inertia_yy=0 inertia_zz=0 meshes=clavicle_l.vtp
      WeldJoint sternoclavicular_l: parent_body=thorax location_in_parent=(0.006325 0.00693 -0.025465) location=(0 0 0)
    Body scapula_r: mass=0 mass_center=(0 0 0) inertia_xx=0 inertia_yy=0 inertia_zz=0 meshes=scapula.vtp
      WeldJoint acromioclavicular_r: parent_body=clavicle_r location_in_parent=(-0.01433 0.02007 0.135535)
          location=(0 0 0)
    Body scapula_l: mass=0 mass_center=(0 0 0) inertia_xx=0.00000001 inertia_yy=0.00000001 inertia_zz=0.00000001
        meshes=scapula_l.vtp
      WeldJoint acromioclavicular_l: parent_body=clavicle_l location_in_parent=(-0.01433 0.02007 -0.135535)
          location=(0 0 0)
    Body humerus_r: mass=1.865 mass_center=(0 -0.181 0) inertia_xx=0.01481 inertia_yy=0.004551 inertia_zz=0.013193
        meshes=arm_r_humerus.vtp
      PinJoint r_shoulder: parent_body=thorax location_in_parent=(0 0 0.17) location=(0 0 0)
        Coordinate shoulder_flexion_r: motion_type=rotational default_value=0 initial_value=0
            range=(-1.570796 3.141593) clamped=false locked=true
    Body forearm_r: mass=1.534 mass_center=(0 -0.182 0) inertia_xx=0.019281 inertia_yy=0.001571 inertia_zz=0.020062
        meshes=(arm_r_ulna.vtp arm_r_radius.vtp arm_r_lunate.vtp arm_r_scaphoid.vtp arm_r_pisiform.vtp arm_r_triquetrum.vtp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)
      PinJoint r_elbow: parent_body=humerus_r location_in_parent=(0 -0.29 0) location=(0 0 0)
        Coordinate elbow_flexion_r: motion_type=rotational default_value=1.570796 initial_value=0 range=(0 2.268928)
            clamped=false
    Body humerus_l: mass=1.9241 mass_center=(-0.005 -0.1676 0.008) inertia_xx=0.0132 inertia_yy=0.0041
        inertia_zz=0.0117 meshes=humerus_l.vtp
      WeldJoint shoulder_r: parent_body=scapula_l location_in_parent=(-0.00955 -0.034 -0.009) location=(0 0 0)
    Body ulna_l: mass=1.1502 mass_center=(0.01 -0.116 -0.015) inertia_xx=0.0056 inertia_yy=0.0011 inertia_zz=0.0052
        meshes=ulna_l.vtp
      WeldJoint elbow_l: parent_body=humerus_l location_in_parent=(0.0061 -0.2904 0.0123) location=(0 0 0)
    Body radius_l: mass=0 mass_center=(0 0 0) inertia_xx=0 inertia_yy=0 inertia_zz=0 meshes=radius_l.vtp
      WeldJoint radioulnar_l: parent_body=ulna_l location_in_parent=(0.0004 -0.011503 -0.019999) location=(0 0 0)
    Body lunate_l: mass=0.4331 mass_center=(0.01 -0.0636 0) inertia_xx=0.0011 inertia_yy=0.0004513
        inertia_zz=0.00073861 meshes=lunate_l.vtp
      WeldJoint radiocarpal_l: parent_body=radius_l location_in_parent=(0.018 -0.242 -0.025)
          orientation_in_parent=(0 -1.570796 0) location=(0 0 0) orientation=(0 -1.570796 0)
    Body scaphoid_l: mass=0 mass_center=(0 0 0) inertia_xx=0 inertia_yy=0 inertia_zz=0 meshes=scaphoid_l.vtp
      WeldJoint lun_scaph_l: parent_body=lunate_l location_in_parent=(0.012345 -0.004464 0.001254) location=(0 0 0)
    Body pisiform_l: mass=0 mass_center=(0 0 0) inertia_xx=0 inertia_yy=0 inertia_zz=0 meshes=pisiform_l.vtp
      WeldJoint lun_pis_l: parent_body=lunate_l location_in_parent=(-0.013388 -0.009886 0.010593) location=(0 0 0)
    Body triquetrum_l: mass=0 mass_center=(0 0 0) inertia_xx=0 inertia_yy=0 inertia_zz=0 meshes=triquetrum_l.vtp
      WeldJoint lun_triq_l: parent_body=lunate_l location_in_parent=(-0.010784 -0.007499 0.001289) location=(0 0 0)
    Body capitate_l: mass=0 mass_center=(0 0 0) inertia_xx=0 inertia_yy=0 inertia_zz=0 meshes=capitate_l.vtp
      WeldJoint proximal_distal_l: parent_body=lunate_l location_in_parent=(0.003992 -0.015054 -0.002327)
          location=(0 0 0)
    Body trapezium_l: mass=0 mass_center=(0 0 0) inertia_xx=0 inertia_yy=0 inertia_zz=0 meshes=trapezium_l.vtp
      WeldJoint cap_trpzm_l: parent_body=capitate_l location_in_parent=(0.015293 -0.004569 0.010308) location=(0 0 0)
    Body trapezoid_l: mass=0 mass_center=(0 0 0) inertia_xx=0 inertia_yy=0 inertia_zz=0 meshes=trapezoid_l.vtp
      WeldJoint cap_trpzd_l: parent_body=capitate_l location_in_parent=(0.009143 -0.004062 0.002464) location=(0 0 0)
    Body hamate_l: mass=0 mass_center=(0 0 0) inertia_xx=0 inertia_yy=0 inertia_zz=0 meshes=hamate_l.vtp
      WeldJoint cap_ham_l: parent_body=capitate_l location_in_parent=(-0.010969 -0.002495 0.00075) location=(0 0 0)
    Body firstmc_l: mass=0 mass_center=(0 0 0) inertia_xx=0 inertia_yy=0 inertia_zz=0 meshes=1mc_l.vtp
      WeldJoint CMC1b_l: parent_body=trapezium_l location_in_parent=(0.0072 -0.0054 0.0025) location=(0 0 0)
    Body secondmc_l: mass=0 mass_center=(0 0 0) inertia_xx=0 inertia_yy=0 inertia_zz=0 meshes=2mc_l.vtp
      WeldJoint CMC2_l: parent_body=capitate_l location_in_parent=(0.014685 -0.03762 -0.005032) location=(0 0 0)
    Body thirdmc_l: mass=0 mass_center=(0 0 0) inertia_xx=0 inertia_yy=0 inertia_zz=0 meshes=3mc_l.vtp
      WeldJoint CMC3_l: parent_body=capitate_l location_in_parent=(0.000477 -0.039239 -0.007377) location=(0 0 0)
    Body fourthmc_l: mass=0 mass_center=(0 0 0) inertia_xx=0 inertia_yy=0 inertia_zz=0 meshes=4mc_l.vtp
      WeldJoint CMC4_l: parent_body=capitate_l location_in_parent=(-0.012046 -0.040519 -0.003513) location=(0 0 0)
    Body fifthmc_l: mass=0 mass_center=(0 0 0) inertia_xx=0 inertia_yy=0 inertia_zz=0 meshes=5mc_l.vtp
      WeldJoint CMC5_l: parent_body=capitate_l location_in_parent=(-0.021896 -0.034683 0.004218) location=(0 0 0)
    Body proximal_thumb_l: mass=0 mass_center=(0 0 0) inertia_xx=0 inertia_yy=0 inertia_zz=0 meshes=thumbprox_l.vtp
      WeldJoint MCP_l: parent_body=firstmc_l location_in_parent=(0.0165 -0.0292 0.0127) location=(0 0 0)
    Body distal_thumb_l: mass=0 mass_center=(0 0 0) inertia_xx=0 inertia_yy=0 inertia_zz=0 meshes=thumbdist_l.vtp
      WeldJoint IP_l: parent_body=proximal_thumb_l location_in_parent=(0.014 -0.0259 0.0101) location=(0 0 0)
    Body 2proxph_l: mass=0 mass_center=(0 0 0) inertia_xx=0 inertia_yy=0 inertia_zz=0 meshes=2proxph_l.vtp
      WeldJoint 2MCP_l: parent_body=secondmc_l location_in_parent=(0.003501 -0.028243 -0.00362) location=(0 0 0)
    Body 2midph_l: mass=0 mass_center=(0 0 0) inertia_xx=0 inertia_yy=0 inertia_zz=0 meshes=2midph_l.vtp
      WeldJoint 2prox-midph_l: parent_body=2proxph_l location_in_parent=(0.007517 -0.041273 -0.007326) location=(0 0 0)
    Body 2distph_l: mass=0 mass_center=(0 0 0) inertia_xx=0 inertia_yy=0 inertia_zz=0 meshes=2distph_l.vtp
      WeldJoint 2mid-distph_l: parent_body=2midph_l location_in_parent=(0.003333 -0.024888 -0.00122) location=(0 0 0)
    Body 3proxph_l: mass=0 mass_center=(0 0 0) inertia_xx=0 inertia_yy=0 inertia_zz=0 meshes=3proxph_l.vtp
      WeldJoint 3MCP_l: parent_body=thirdmc_l location_in_parent=(0.00024 -0.02629 -0.001778) location=(0 0 0)
    Body 3midph_l: mass=0 mass_center=(0 0 0) inertia_xx=0 inertia_yy=0 inertia_zz=0 meshes=3midph_l.vtp
      WeldJoint 3prox-midph_l: parent_body=3proxph_l location_in_parent=(0.00165 -0.044211 -0.00623) location=(0 0 0)
    Body 3distph_l: mass=0 mass_center=(0 0 0) inertia_xx=0 inertia_yy=0 inertia_zz=0 meshes=3distph_l.vtp
      WeldJoint 3mid-distph_l: parent_body=3midph_l location_in_parent=(0.001365 -0.029047 -0.001954) location=(0 0 0)
    Body 4proxph_l: mass=0 mass_center=(0 0 0) inertia_xx=0 inertia_yy=0 inertia_zz=0 meshes=4proxph_l.vtp
      WeldJoint 4MCP_l: parent_body=fourthmc_l location_in_parent=(-0.00183 -0.023689 0.000173) location=(0 0 0)
    Body 4midph_l: mass=0 mass_center=(0 0 0) inertia_xx=0 inertia_yy=0 inertia_zz=0 meshes=4midph_l.vtp
      WeldJoint 4prox-midph_l: parent_body=4proxph_l location_in_parent=(-0.003528 -0.040255 -0.001345)
          location=(0 0 0)
    Body 4distph_l: mass=0 mass_center=(0 0 0) inertia_xx=0 inertia_yy=0 inertia_zz=0 meshes=4distph_l.vtp
      WeldJoint 4mid-distph_l: parent_body=4midph_l location_in_parent=(-0.002317 -0.024789 -0.000563) location=(0 0 0)
    Body 5proxph_l: mass=0 mass_center=(0 0 0) inertia_xx=0 inertia_yy=0 inertia_zz=0 meshes=5proxph_l.vtp
      WeldJoint 5MCP_l: parent_body=fifthmc_l location_in_parent=(-0.001597 -0.021431 0.001496) location=(0 0 0)
    Body 5midph_l: mass=0 mass_center=(0 0 0) inertia_xx=0 inertia_yy=0 inertia_zz=0 meshes=5midph_l.vtp
      WeldJoint 5prox-midph_l: parent_body=5proxph_l location_in_parent=(-0.005279 -0.035563 0.002879) location=(0 0 0)
    Body 5distph_l: mass=0 mass_center=(0 0 0) inertia_xx=0 inertia_yy=0 inertia_zz=0 meshes=5distph_l.vtp
      WeldJoint 5mid-distph_l: parent_body=5midph_l location_in_parent=(-0.002871 -0.020677 0.002243) location=(0 0 0)
    Body Barbell: mass=10 mass_center=(0.1 0 0.07) inertia_xx=0 inertia_yy=0 inertia_zz=0
        meshes=Geometry/15lb_6.8kg_Dumbbell.stl
      WeldJoint hand_barbell: parent_body=forearm_r location_in_parent=(0.08 -0.36 -0.035) location=(0 0 0)
          orientation=(0 1.570796 0)
