# OpenSim document version 20001
AnalyzeTool ArmCurling:
  replace_force_set: false
  results_directory: /Results
  output_precision: 20
  initial_time: 0
  final_time: 1
  solve_for_equilibrium_for_auxiliary_states: false
  maximum_number_of_integrator_steps: 20000
  maximum_integrator_step_size: 1
  minimum_integrator_step_size: 0.00000001
  integrator_error_tolerance: 0.001
  coordinates_file: ArmCurlingStaticElbow90.mot
  lowpass_cutoff_frequency_for_coordinates: 6
  lowpass_cutoff_frequency_for_load_kinematics: -1
  AnalysisSet Analyses:
    StaticOptimization: start_time=-1.#INF0000000000000000 end_time=1.#INF0000000000000000 step_interval=1
        in_degrees=true use_model_force_set=true activation_exponent=2 use_muscle_physiology=false
