# OpenSim document version 20302
Model Soccer Ball Kicking Model:
  length_units: meters
  force_units: N
  gravity: 0 -9.80665 0
  credits:
    Seth A., Reinbolt J.A, Delp D., Hamner S., Habib A., Delp S.L., Loan J.P.
  publications:
    Notes: 2D, 6 DOF leg model created by Jeff Reinbolt, Ajay Seth, and Scott L. Delp, Stanford University. Lower extremity joint defintions based on Delp et al. (1990).
    Number of muscles was reduced by Reinbolt to improve simulation speed for demonstrations and is not intended to be used in research.
    Number of constraints reduced by A. Seth.
    Foot-ball-ground contact added by A. Seth.
    Soccer ball and goal added by Seth using OpenSim geometry created by Denny Delp.
    Graphics for ball and customized GUI by Ayman Habib
    Backstop of net and full body model contributed by Samuel Hamner and added by A. Seth
    Goalie is the "Freebie Man 3d model" from http://thefree3dmodels.com/stuff/characters/freebie_man/14-1-0-1166 and added by A. Seth
  ForceSet:
    Thelen2003Muscle [values shared by the 9 below unless stated]: min_control=0.01 max_control=1 optimal_force=1
        max_contraction_velocity=10 activation_time_constant=0.01 deactivation_time_constant=0.04 Vmax=10 Vmax0=5
        FmaxTendonStrain=0.033 FmaxMuscleStrain=0.6 KshapeActive=0.5 KshapePassive=4 damping=0.05 Af=0.3 Flen=1.8
    Thelen2003Muscle bifemlh_r: max_isometric_force=2594 optimal_fiber_length=0.1282385 tendon_slack_length=0.383539
        pennation_angle_at_optimal=0
      PathPoint P1: pelvis (-0.1317524 -0.1072868 0.07263326)
      PathPoint P2: tibia_r (-0.03382422 -0.04045422 0.03307132)
      PathPoint P3: tibia_r (-0.02629524 -0.06326589 0.03854388)
    Thelen2003Muscle bifemsh_r: max_isometric_force=960 optimal_fiber_length=0.2008373 tendon_slack_length=0.1033209
        pennation_angle_at_optimal=0.4014257
      PathPoint P1: femur_r (0.0058689 -0.2477849 0.02746645)
      PathPoint P2: tibia_r (-0.03382422 -0.04045422 0.03307132)
      PathPoint P3: tibia_r (-0.02629524 -0.06326589 0.03854388)
    Thelen2003Muscle glut_max2_r: max_isometric_force=1944 optimal_fiber_length=0.1629139 tendon_slack_length=0.1407488
        pennation_angle_at_optimal=0
      PathPoint P1: pelvis (-0.1411035 0.01840936 0.05888901)
      PathPoint P2: pelvis (-0.1439277 -0.05439127 0.09560311)
      PathPoint P3: femur_r (-0.05000302 -0.06221034 0.03439175)
      PathPoint P4: femur_r (-0.01831096 -0.119256 0.04918138)
    Thelen2003Muscle psoas_r: max_isometric_force=2342 optimal_fiber_length=0.1074282 tendon_slack_length=0.1718851
        pennation_angle_at_optimal=0.1396263
      PathPoint P1: pelvis (-0.06767528 0.09277894 0.030229)
      PathPoint P2: pelvis (-0.02489446 -0.05962119 0.07939033)
      ConditionalPathPoint P3: pelvis (-0.03012439 -0.08420186 0.08535245) range=(-1.570796 0.7853982)
          coordinate=hip_flexion_r
      PathPoint P4: femur_r (0.00187804 -0.05951064 0.00446036)
      PathPoint P5: femur_r (-0.02206706 -0.07007466 0.01220732)
    Thelen2003Muscle rect_fem_r: max_isometric_force=1169 optimal_fiber_length=0.1328739 tendon_slack_length=0.3613238
        pennation_angle_at_optimal=0.08726646
      PathPoint P1: pelvis (-0.03085658 -0.03253017 0.1012514)
      ConditionalPathPoint P2: femur_r (0.03920425 -0.4730333 0.00223019) range=(-2.617994 -1.459968)
          coordinate=knee_angle_r
      MovingPathPoint P3: tibia_r (0.0224144 0.0270359 0.00157322) x_coordinate=knee_angle_r y_coordinate=knee_angle_r
          z_coordinate=knee_angle_r
        x_location: MultiplierFunction: scale=1
          NaturalCubicSpline: x=(-2.094395 -1.999973 -1.570796 -1.457524 -1.396263 -1.047198 -0.6981317 -0.5263913 -0.3490659 -0.1745329 0 0.00017453 0.00034907 0.02792527 0.08726646 0.1745329 2.094395)
              y=(0.01750824 0.02022016 0.03091163 0.03332567 0.03456762 0.04109421 0.04742967 0.05066911 0.05437834 0.06004071 0.0693987 0.06940917 0.06941965 0.07114133 0.075283 0.08237317 0.06444365)
        y_location: MultiplierFunction: scale=1
          NaturalCubicSpline: x=(-2.094395 -1.999973 -1.570796 -1.457524 -1.396263 -1.047198 -0.6981317 -0.5263913 -0.3490659 -0.1745329 0 0.00017453 0.00034907 0.02792527 0.08726646 0.1745329 2.094395)
              y=(0.02630829 0.02670125 0.02822146 0.02840727 0.02844676 0.02800151 0.02723615 0.02679499 0.0263174 0.025581 0.02358034 0.02357743 0.02357451 0.02306167 0.02154794 0.01792958 -0.07571385)
        z_location: MultiplierFunction: scale=1
          NaturalCubicSpline: x=(-2.0944 0.1745) y=(0.00157322 0.00157322)
    Thelen2003Muscle vas_int_r: max_isometric_force=4530 optimal_fiber_length=0.1261733 tendon_slack_length=0.136786
        pennation_angle_at_optimal=0.05235988
      PathPoint P1: femur_r (0.03403962 -0.2258353 0.03638718)
      PathPoint P2: femur_r (0.03932163 -0.2446157 0.03345273)
      ConditionalPathPoint P3: femur_r (0.04026065 -0.4730333 0.00645579) range=(-2.617994 -1.42)
          coordinate=knee_angle_r
      MovingPathPoint P4: tibia_r (0.0142035 0.02949528 0.00202271) x_coordinate=knee_angle_r y_coordinate=knee_angle_r
          z_coordinate=knee_angle_r
        x_location: MultiplierFunction: scale=1
          NaturalCubicSpline: x=(-2.094395 -1.999973 -1.570796 -1.457524 -1.396263 -1.047198 -0.6981317 -0.5263913 -0.3490659 -0.1745329 0 0.00017453 0.00034907 0.02792527 0.08726646 0.1745329 2.094395)
              y=(0.00929694 0.01200886 0.02270399 0.02511867 0.02636072 0.03289322 0.03927035 0.04255675 0.04636153 0.0522856 0.06232559 0.06233709 0.06234861 0.06424544 0.06885306 0.07690442 0.07290945)
        y_location: MultiplierFunction: scale=1
          NaturalCubicSpline: x=(-2.094395 -1.999973 -1.570796 -1.457524 -1.396263 -1.047198 -0.6981317 -0.5263913 -0.3490659 -0.1745329 0 0.00017453 0.00034907 0.02792527 0.08726646 0.1745329 2.094395)
              y=(0.02876636 0.02915931 0.03069173 0.03087965 0.03091951 0.03049381 0.0298616 0.02956221 0.02935032 0.02923145 0.02842169 0.02842028 0.02841887 0.02815229 0.02721572 0.02452961 -0.07705468)
        z_location: MultiplierFunction: scale=1
          NaturalCubicSpline: x=(-2.0944 2.0944) y=(0.00202271 0.00202271)
    Thelen2003Muscle med_gas_r: max_isometric_force=2241 optimal_fiber_length=0.1031128 tendon_slack_length=0.4124513
        pennation_angle_at_optimal=0.296706
      PathPoint P1: femur_r (-0.02230182 -0.4611781 -0.02758383)
      ConditionalPathPoint P2: femur_r (-0.0352134 -0.4720943 -0.03028352) range=(-0.7853982 0.1745329)
          coordinate=knee_angle_r
      PathPoint P3: calcn_r (0 0.03183479 -0.00544272)
    Thelen2003Muscle soleus_r: max_isometric_force=5137 optimal_fiber_length=0.092647 tendon_slack_length=0.2547793
        pennation_angle_at_optimal=0.4363323
      PathPoint P1: tibia_r (-0.00269695 -0.1722675 0.00797847)
      PathPoint P2: calcn_r (0 0.03183479 -0.00544272)
    Thelen2003Muscle tib_ant_r: min_control=0.02 max_isometric_force=1759 optimal_fiber_length=0.1100528
        tendon_slack_length=0.2504262 pennation_angle_at_optimal=0.08726646
      PathPoint P1: tibia_r (0.02011473 -0.1824935 0.01292287)
      PathPoint P2: tibia_r (0.03697066 -0.443985 -0.01988999)
      PathPoint P3: calcn_r (0.1197399 0.01827933 -0.03132133)
    CoordinateLimitForce knee_stop_r: coordinate=knee_angle_r upper_stiffness=200 [N*m/degree] upper_limit=0
        lower_stiffness=50 [N*m/degree] lower_limit=-120 damping=0.1 transition=2
    CoordinateLimitForce ankle_stop_r: coordinate=ankle_angle_r upper_stiffness=100 upper_limit=38 lower_stiffness=100
        lower_limit=-45 damping=0.05 transition=2
    HuntCrossleyForce foot_ground: transition_velocity=0.01
      ContactParametersSet:
        ContactParameters: geometry=(ground ball_big_toe_r tip_big_toe_r small_toe_r) stiffness=10000000
            dissipation=0.005 static_friction=0.2 dynamic_friction=0.1 viscous_friction=0.05
    HuntCrossleyForce foot_ball: transition_velocity=0.01
      ContactParametersSet:
        ContactParameters: geometry=(ball ball_big_toe_r tip_big_toe_r small_toe_r) stiffness=1000000 dissipation=0.005
            static_friction=0.7 dynamic_friction=0.5 viscous_friction=0.1
    HuntCrossleyForce ball_ground: transition_velocity=0.01
      ContactParametersSet:
        ContactParameters: geometry=(ground ball) stiffness=1000000 dissipation=0.1 static_friction=0.7
            dynamic_friction=0.4 viscous_friction=0.1
    HuntCrossleyForce ball_net: transition_velocity=0.1
      ContactParametersSet:
        ContactParameters: geometry=(back_stop ball) stiffness=50000 dissipation=0.2 static_friction=0.7
            dynamic_friction=0.4 viscous_friction=0.3
    HuntCrossleyForce goalie_ball: transition_velocity=0.1
      ContactParametersSet:
        ContactParameters: geometry=(ball goalie_head goalie_hand_r goalie_hand_l goalie_torso goalie_foot_r goalie_foot_l goalie_knee_r goalie_knee_l goalie_elbow_r goalie_elbow_l)
            stiffness=500000 dissipation=0.2 static_friction=0.7 dynamic_friction=0.4 viscous_friction=0.3
  BodySet:
    Body ground: mass=0 mass_center=(0 0 0) inertia_xx=0 inertia_yy=0 inertia_zz=0
        meshes=(Soccer_frame.STL Soccer_net.STL Grass.vtp Sky.vtp plane.vtp)
    Body swivel: mass=0 mass_center=(0 0 0) inertia_xx=0 inertia_yy=0 inertia_zz=0
      PinJoint ground_pelvis: parent_body=ground location_in_parent=(0.5 1.06 -0.15)
          orientation_in_parent=(-1.5708 0 0) location=(0 0 0) orientation=(-1.5708 0 0)
        Coordinate turn: motion_type=rotational default_value=0 range=(-0.5236 0.5236) clamped=false
    Body pelvis: mass=10.43488 mass_center=(-0.06998123 0 0) inertia_xx=0.08924215 inertia_yy=0.07561276
        inertia_zz=0.05026382 meshes=(sacrum.vtp pelvis.vtp l_pelvis.vtp)
      WeldJoint ground_swivel: parent_body=swivel location_in_parent=(0 0 0)
          orientation_in_parent=(-0.03490659 0.1396263 -0.0872664) location=(0 0 0)
    Body femur_r: mass=8.549266 mass_center=(0 -0.1995426 0) inertia_xx=0.1695643 inertia_yy=0.0444489
        inertia_zz=0.1788087 meshes=femur_r.vtp
      CustomJoint hip_r: parent_body=pelvis location_in_parent=(-0.07395121 -0.06913966 0.08733982) location=(0 0 0)
        Coordinate hip_flexion_r: motion_type=rotational default_value=-0.6981317 initial_value=-0.6981317
            range=(-2.094395 2.094395) clamped=false
        SpatialTransform: axes_held_at_zero=(translation1 translation2 translation3)
          TransformAxis rotation1: coordinates=hip_flexion_r axis=(0 0 1) LinearFunction(coefficients=1 0)
          TransformAxis rotation2: axis=(1 0 0) Constant(value=-0.01555646)
          TransformAxis rotation3: axis=(0 1 0) Constant(value=-0.07460014)
    Body tibia_r: mass=4.674042 mass_center=(0 -0.2098001 0) inertia_xx=0.08023514 inertia_yy=0.00811903
        inertia_zz=0.08134951 meshes=(tibia_r.vtp fibula_r.vtp)
      CustomJoint knee_r: parent_body=femur_r location_in_parent=(0 0 0) location=(0 0 0)
        Coordinate knee_angle_r: motion_type=rotational default_value=-1.919862 initial_value=-1.919862
            range=(-2.094395 0.1745329) clamped=false
        SpatialTransform: axes_held_at_zero=(rotation2 rotation3 translation3)
          TransformAxis rotation1: coordinates=knee_angle_r axis=(0 0 1) LinearFunction(coefficients=1 0)
          TransformAxis translation1: coordinates=knee_angle_r axis=(1 0 0)
            MultiplierFunction: scale=1
              NaturalCubicSpline: x=(-2.094395 -1.745329 -1.396263 -1.047198 -0.6981317 -0.3490659 -0.1745329 0.1973442 0.337395 0.4901776 1.52146 2.094395)
                  y=(-0.0037561 0.00210107 0.00482424 0.00481249 0.00248841 -0.00117378 -0.00363871 -0.00613534 -0.00637949 -0.00654265 -0.00637949 -0.00616234)
          TransformAxis translation2: coordinates=knee_angle_r axis=(0 1 0)
            MultiplierFunction: scale=1
              NaturalCubicSpline: x=(-2.094395 -1.22173 -0.5235988 -0.3490659 -0.1745329 0.1591486 2.094395)
                  y=(-0.4960394 -0.479137 -0.4683382 -0.4666949 -0.4655211 -0.4639529 -0.4648168)
    Body patella_r: mass=0.09191376 mass_center=(0 0 0) inertia_xx=0.00110296 inertia_yy=0.00110296
        inertia_zz=0.00110296 meshes=pat.vtp
      CustomJoint tib_pat_r: parent_body=tibia_r location_in_parent=(0 0 0) location=(0 0 0)
        Coordinate knee_angle_pat_r: motion_type=rotational default_value=-1.919862 initial_value=-1.919862
            range=(-2.094 10) clamped=false
        SpatialTransform: axes_held_at_zero=(rotation2 rotation3 translation3)
          TransformAxis rotation1: coordinates=knee_angle_pat_r axis=(0 0 1)
            NaturalCubicSpline: x=(-2.094395 -1.999973 -1.457524 -0.5263913 0.02792527 0.1745329)
                y=(0.3080506 0.3080506 0.3063053 0.270177 -0.03700098 -0.2799508)
          TransformAxis translation1: coordinates=knee_angle_pat_r axis=(1 0 0)
            MultiplierFunction: scale=1
              NaturalCubicSpline: x=(-2.094395 -1.396263 -1.047198 -0.6981317 -0.3490659 -0.1745329 0 0.00017453 0.00034907 0.08726646 2.094395)
                  y=(0.0194405 0.0364088 0.04281405 0.04832031 0.05270285 0.05438844 0.05573692 0.05573692 0.05573692 0.05573692 0.05573692)
          TransformAxis translation2: coordinates=knee_angle_pat_r axis=(0 1 0)
            MultiplierFunction: scale=1
              NaturalCubicSpline: x=(-2.094395 -1.570796 -1.396263 -1.047198 -0.6981317 -0.3490659 -0.1745329 0 0.00017453 0.00034907 0.08726646 2.094395)
                  y=(-0.02460964 -0.0226993 -0.02247456 -0.02292406 -0.02371067 -0.02460964 -0.02505914 -0.02550863 -0.02550863 -0.02550863 -0.02550863 -0.02550863)
    Body talus_r: mass=0.1260686 mass_center=(0 0 0) inertia_xx=0.00202166 inertia_yy=0.00202166 inertia_zz=0.00202166
        meshes=talus.vtp
      CustomJoint ankle_r: parent_body=tibia_r location_in_parent=(0 -0.4832031 0) location=(0 0 0)
        Coordinate ankle_angle_r: motion_type=rotational default_value=-0.174533 initial_value=-0.174533
            range=(-1.571 1.571) clamped=false
        SpatialTransform: axes_held_at_zero=(rotation2 rotation3 translation1 translation2 translation3)
          TransformAxis rotation1: coordinates=ankle_angle_r axis=(-0.105 -0.174 0.979)
              LinearFunction(coefficients=1 0)
    Body calcn_r: mass=1.072248 mass_center=(0.1026929 0.03080786 0) inertia_xx=0.00090462 inertia_yy=0.00361848
        inertia_zz=0.00361848 meshes=foot.vtp
      WeldJoint subtalar_r: parent_body=talus_r location_in_parent=(-0.06205078 -0.05318638 0.01013073)
          location=(0 0 0)
    Body toes_r: mass=0.1861423 mass_center=(0.03594251 0.00616157 -0.01848472) inertia_xx=0 inertia_yy=0
        inertia_zz=0.00090462 meshes=bofoot.vtp
      WeldJoint mtp_r: parent_body=calcn_r location_in_parent=(0.1838202 -0.00205386 0.00102692) location=(0 0 0)
    Body femur_l: mass=8.549266 mass_center=(0 -0.1995426 0) inertia_xx=0.1695643 inertia_yy=0.0444489
        inertia_zz=0.1788087 meshes=femur_l.vtp
      WeldJoint hip_l: parent_body=pelvis location_in_parent=(-0.07395121 -0.06913966 -0.08733982)
          orientation_in_parent=(0 0 0.3490659) location=(0 0 0)
    Body tibia_l: mass=4.674042 mass_center=(0 -0.2098001 0) inertia_xx=0.08023514 inertia_yy=0.00811903
        inertia_zz=0.08134951 meshes=(tibia_l.vtp fibula_l.vtp)
      WeldJoint knee_l: parent_body=femur_l location_in_parent=(-0.00363871 -0.4655211 0)
          orientation_in_parent=(0 0 -0.1745329) location=(0 0 0)
    Body patella_l: mass=0.09191376 mass_center=(0 0 0) inertia_xx=0.00110296 inertia_yy=0.00110296
        inertia_zz=0.00110296 meshes=l_pat.vtp
      WeldJoint tib_pat_l: parent_body=tibia_l location_in_parent=(0.05438844 -0.02505914 0)
          orientation_in_parent=(0 0 0.1) location=(0 0 0)
    Body talus_l: mass=0.1260686 mass_center=(0 0 0) inertia_xx=0.00202166 inertia_yy=0.00202166 inertia_zz=0.00202166
        meshes=l_talus.vtp
      WeldJoint ankle_l: parent_body=tibia_l location_in_parent=(0 -0.4832031 0)
          orientation_in_parent=(0 0 -0.03205593) location=(0 0 0)
    Body calcn_l: mass=1.072248 mass_center=(0.1026929 0.03080786 0) inertia_xx=0.00090462 inertia_yy=0.00361848
        inertia_zz=0.00361848 meshes=l_foot.vtp
      WeldJoint subtalar_l: parent_body=talus_l location_in_parent=(-0.06205078 -0.05318638 0.01013073)
          location=(0 0 0)
    Body toes_l: mass=0.1861423 mass_center=(0.03594251 0.00616157 -0.01848472) inertia_xx=0 inertia_yy=0
        inertia_zz=0.00090462 meshes=bofoot.vtp
      WeldJoint mtp_l: parent_body=calcn_l location_in_parent=(0.1838202 -0.00205386 0.00102692) location=(0 0 0)
    Body torso: mass=23.7694 mass_center=(0.03240046 0.3788536 -0.00089513) inertia_xx=1.459837 inertia_yy=0.7479868
        inertia_zz=1.417165 meshes=(hat_spine.vtp hat_jaw.vtp hat_skull.vtp hat_ribs_scap.vtp)
      WeldJoint back: parent_body=pelvis location_in_parent=(-0.09967624 0.08067143 0)
          orientation_in_parent=(-0.1745329 0.3006031 0) location=(0 0 0)
    Body humerus_r: mass=1.800873 mass_center=(0 -0.1750301 0) inertia_xx=0.00955261 inertia_yy=0.00329536
        inertia_zz=0.01072251 meshes=humerus_rv.vtp
      WeldJoint acromial_r: parent_body=torso location_in_parent=(0.00373526 0.4198254 0.191266)
          orientation_in_parent=(-0.8 0 -1) location=(0 0 0)
    Body ulna_r: mass=0.5382684 mass_center=(0 -0.1454474 0) inertia_xx=0.00304691 inertia_yy=0.00063572
        inertia_zz=0.00330511 meshes=ulna_rv.vtp
      WeldJoint elbow_r: parent_body=humerus_r location_in_parent=(0.01398522 -0.3045945 -0.01020908)
          orientation_in_parent=(0 0 0.8) location=(0 0 0)
    Body radius_r: mass=0.5382684 mass_center=(0 -0.1454474 0) inertia_xx=0.00304691 inertia_yy=0.00063572
        inertia_zz=0.00330511 meshes=radius_rv.vtp
      WeldJoint radioulnar_r: parent_body=ulna_r location_in_parent=(-0.00811802 -0.01569661 0.03147649)
          location=(0 0 0)
    Body hand_r: mass=0.4053626 mass_center=(0 -0.0762664 0) inertia_xx=0.00079034 inertia_yy=0.00048467
        inertia_zz=0.00118729
        meshes=(pisiform_rvs.vtp lunate_rvs.vtp scaphoid_rvs.vtp triquetrum_rvs.vtp hamate_rvs.vtp capitate_rvs.vtp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)
      WeldJoint radius_hand_r: parent_body=radius_r location_in_parent=(-0.01061607 -0.2706087 0.01642431)
          location=(0 0 0)
    Body humerus_l: mass=1.800873 mass_center=(0 -0.1750301 0) inertia_xx=0.00955261 inertia_yy=0.00329536
        inertia_zz=0.01072251 meshes=humerus_lv.vtp
      WeldJoint acromial_l: parent_body=torso location_in_parent=(0.00373526 0.4198254 -0.191266)
          orientation_in_parent=(0.8 0 1) location=(0 0 0)
    Body ulna_l: mass=0.5382684 mass_center=(0 -0.1454474 0) inertia_xx=0.00304691 inertia_yy=0.00063572
        inertia_zz=0.00330511 meshes=ulna_lv.vtp
      WeldJoint elbow_l: parent_body=humerus_l location_in_parent=(0.01398522 -0.3045945 0.01020908)
          orientation_in_parent=(-0.3 0 1.2) location=(0 0 0)
    Body radius_l: mass=0.5382684 mass_center=(0 -0.1454474 0) inertia_xx=0.00304691 inertia_yy=0.00063572
        inertia_zz=0.00330511 meshes=radius_lv.vtp
      WeldJoint radioulnar_l: parent_body=ulna_l location_in_parent=(-0.00811802 -0.01569661 -0.03147649)
          orientation_in_parent=(0 -1.7 0) location=(0 0 0)
    Body hand_l: mass=0.4053626 mass_center=(0 -0.0762664 0) inertia_xx=0.00079034 inertia_yy=0.00048467
        inertia_zz=0.00118729
        meshes=(pisiform_lvs.vtp lunate_lvs.vtp scaphoid_lvs.vtp triquetrum_lvs.vtp hamate_lvs.vtp capitate_lvs.vtp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)
      WeldJoint radius_hand_l: parent_body=radius_l location_in_parent=(-0.01061607 -0.2706087 -0.01642431)
          location=(0 0 0)
    Body goalie: mass=150 mass_center=(0 1 0) inertia_xx=1.10079 inertia_yy=0.4004847 inertia_zz=1.001187
        meshes=goalie_smooth.obj
      WeldJoint goalie_ground: parent_body=ground location_in_parent=(6 0 -1) orientation_in_parent=(0 3.141593 0)
          location=(0 0 0)
    Body ball: mass=0.25 mass_center=(0 0 0) inertia_xx=0.02 inertia_yy=0.02 inertia_zz=0.02
        meshes=(soccer_ball_seg_Holes.obj soccer_ball.obj)
      FreeJoint free: parent_body=ground location_in_parent=(0 0 0) location=(0 0 0)
        Coordinate ball_rx: motion_type=rotational default_value=0 initial_value=0 range=(-1.570796 1.570796)
            clamped=false
        Coordinate ball_ry: motion_type=rotational default_value=0 initial_value=0 range=(-1.570796 1.570796)
            clamped=false
        Coordinate ball_rz: motion_type=rotational default_value=0.00000001 initial_value=0.00000001
            range=(-1.570796 1.570796) clamped=false
        Coordinate ball_tx: motion_type=translational default_value=0.7 range=(-1 10) clamped=false
        Coordinate ball_ty: motion_type=translational default_value=0.12 initial_value=0.12 range=(-1 3) clamped=false
        Coordinate ball_tz: motion_type=translational default_value=-0.05 initial_value=0 range=(-1 3) clamped=false
  ConstraintSet:
    CoordinateCouplerConstraint pat_angle_r: independent_coordinate_names=knee_angle_r
        dependent_coordinate_name=knee_angle_pat_r scale_factor=1
        coupled_coordinates_function=LinearFunction(coefficients=1 0)
  ContactGeometrySet:
    ContactHalfSpace ground: body_name=ground location=(0 0 0) orientation=(0 0 -1.570796)
    ContactSphere ball: body_name=ball location=(0.01 0.01 -0.005) radius=0.13
    ContactSphere ball_big_toe_r: body_name=toes_r location=(-0.005 0.006 -0.03) radius=0.04
    ContactSphere tip_big_toe_r: body_name=toes_r location=(0.07 0 0) radius=0.04
    ContactSphere small_toe_r: body_name=toes_r location=(-0.045 0.006 0.045) radius=0.04
    ContactHalfSpace back_stop: body_name=ground location=(8.15 0 0)
    ContactSphere goalie_head: body_name=goalie location=(0.05 1.675 0) radius=0.2
    ContactSphere goalie_hand_r: body_name=goalie location=(0.175 1.35 0.75) radius=0.15
    ContactSphere goalie_hand_l: body_name=goalie location=(0.175 1.35 -0.75) radius=0.15
    ContactSphere goalie_torso: body_name=goalie location=(0 1.1 0) radius=0.3
    ContactSphere goalie_foot_r: body_name=goalie location=(0.1 0.05 0.2) radius=0.15
    ContactSphere goalie_foot_l: body_name=goalie location=(0.1 0.05 -0.2) radius=0.15
    ContactSphere goalie_knee_r: body_name=goalie location=(0 0.5 0.175) radius=0.1
    ContactSphere goalie_knee_l: body_name=goalie location=(0 0.5 -0.175) radius=0.1
    ContactSphere goalie_elbow_r: body_name=goalie location=(0.05 1.45 0.4) radius=0.1
    ContactSphere goalie_elbow_l: body_name=goalie location=(0.05 1.45 -0.4) radius=0.1
