# OpenSim document version 20302
ForwardTool leg6dof9musc_knee_stop:
  replace_force_set: false
  results_directory: kick
  output_precision: 8
  initial_time: 0.1
  final_time: 2.75
  solve_for_equilibrium_for_auxiliary_states: true
  maximum_number_of_integrator_steps: 20000
  maximum_integrator_step_size: 1
  minimum_integrator_step_size: 0.00000001
  integrator_error_tolerance: 0.00005
  AnalysisSet Analyses:
    Kinematics: start_time=.1 end_time=.6 step_interval=1 in_degrees=true coordinates=all
  ControllerSet Controllers:
    ControlSetController: enable_controller=false controls_file=controls_kick.xml
